// COMSOL Multiphysics 6.2.0.290 model "H_method_axisymmetric_model.mph"
// Outline of the model tree

Parameters
  E0 = 1e-4[V/m]  // Critical Electric Field
  mu0 = 4e-7*pi[T/(A/m)]  // Permeability of Vacuum
  n = 38
  Ic = 124.9[A]
  Jc0 = Ic/(4[mm]*1[um])
  f = 10[Hz]

Variables
  var1 "变量 1"
    Jphi = d(Hr,z)-d(Hz,r)
    If = 0.5*Ic*sin(2*pi*f*t)
    Ephi = rho*Jphi
    Q = abs(Jphi*Ephi)
    normB = mu0*sqrt(Hr^2+Hz^2)
    QQ = intop1(Q)
  var2 "变量 2" on domains 3, 6, 9, 12, 15, 18, 21, 24, 27, 30, 33, 36, 39, 42, 45, 48, 51, 54, 57, 60
    rho_sc = E0*(abs(Jphi)/Jc0)^(n-1)/Jc0
    rho = rho_sc
  var3 "变量 3" on domains 1, 2, 4, 5, 7, 8, 10, 11, 13, 14, 16, 17, 19, 20, 22, 23, 25, 26, 28, 29, 31, 32, 34, 35, 37, 38, 40, 41, 43, 44, 46, 47, 49, 50, 52, 53, 55, 56, 58, 59, 61
    rho_air = 1[ohm*m]
    rho = rho_air

Selections
  sel1: Explicit "HTS Tapes" on domains 3, 6, 9, 12, 15, 18, 21, 24, 27, 30, 33, 36, 39, 42, 45, 48, 51, 54, 57, 60

Couplings
  intop1: Integration "积分 1" on selection sel1
  intop2: Integration "积分 2" on domains 3
  intop3: Integration "积分 3" on domains 6
  intop4: Integration "积分 4" on domains 9
  intop5: Integration "积分 5" on domains 12
  intop6: Integration "积分 6" on domains 15
  intop7: Integration "积分 7" on domains 18
  intop8: Integration "积分 8" on domains 21
  intop9: Integration "积分 9" on domains 24
  intop10: Integration "积分 10" on domains 27
  intop11: Integration "积分 11" on domains 30
  intop12: Integration "积分 12" on domains 33
  intop13: Integration "积分 13" on domains 36
  intop14: Integration "积分 14" on domains 39
  intop15: Integration "积分 15" on domains 42
  intop16: Integration "积分 16" on domains 45
  intop17: Integration "积分 17" on domains 48
  intop18: Integration "积分 18" on domains 51
  intop19: Integration "积分 19" on domains 54
  intop20: Integration "积分 20" on domains 57
  intop21: Integration "积分 21" on domains 60

Geometry
  geom1 "几何 1" (2D axisymmetric, length unit mm)
    r1: Rectangle "矩形 1" | pos = {10-0.1/2, 0}; base = center; size = {0.1, 4}
    r2: Rectangle "矩形 2" | pos = {10-0.1/2, 0}; base = center; size = {1[um], 4}
    arr1: Array "阵列 1" | input = r1, r2; size = 20; type = linear; linearsize = 20; displ = {0.1, 0}
    c1: Circle "圆 1" | rot = -90; r = 30*4; angle = 180
    fin: Finalize "形成联合体"

Physics
  g: GeneralFormPDE "一般形式偏微分方程" on all domains
    dependent variable H = {Hr, Hz}
    ShapeProperty.shapeFunctionType = shcurl
    ShapeProperty.order = 1
    Units.DependentVariableQuantity = none
    Units.CustomDependentVariableUnit = A/m
    Units.CustomSourceTermUnit = V*m^-2
    gfeq1: GeneralFormPDE "一般形式偏微分方程 1" (default)
      f = {0, 0}
      Ga = {{0, -r*Ephi}, {r*Ephi, 0}}
      da = {r*mu0, 0, 0, r*mu0}
    zflx1: ZeroFluxBoundary "零通量 1" (default)
    init1: init "初始值 1" (default)
    constr1: PointwiseConstraint "逐点约束 1" on domains 3 | constraintExpression = intop2(Jphi)-If
    constr2: PointwiseConstraint "逐点约束 2" on domains 6 | constraintExpression = intop3(Jphi)-If
    constr3: PointwiseConstraint "逐点约束 3" on domains 9 | constraintExpression = intop4(Jphi)-If
    constr4: PointwiseConstraint "逐点约束 4" on domains 12 | constraintExpression = intop5(Jphi)-If
    constr5: PointwiseConstraint "逐点约束 5" on domains 15 | constraintExpression = intop6(Jphi)-If
    constr6: PointwiseConstraint "逐点约束 6" on domains 18 | constraintExpression = intop7(Jphi)-If
    constr7: PointwiseConstraint "逐点约束 7" on domains 21 | constraintExpression = intop8(Jphi)-If
    constr8: PointwiseConstraint "逐点约束 8" on domains 24 | constraintExpression = intop9(Jphi)-If
    constr9: PointwiseConstraint "逐点约束 9" on domains 27 | constraintExpression = intop10(Jphi)-If
    constr10: PointwiseConstraint "逐点约束 10" on domains 30 | constraintExpression = intop11(Jphi)-If
    constr11: PointwiseConstraint "逐点约束 11" on domains 33 | constraintExpression = intop12(Jphi)-If
    constr12: PointwiseConstraint "逐点约束 12" on domains 36 | constraintExpression = intop13(Jphi)-If
    constr13: PointwiseConstraint "逐点约束 13" on domains 39 | constraintExpression = intop14(Jphi)-If
    constr14: PointwiseConstraint "逐点约束 14" on domains 42 | constraintExpression = intop15(Jphi)-If
    constr15: PointwiseConstraint "逐点约束 15" on domains 45 | constraintExpression = intop16(Jphi)-If
    constr16: PointwiseConstraint "逐点约束 16" on domains 48 | constraintExpression = intop17(Jphi)-If
    constr17: PointwiseConstraint "逐点约束 17" on domains 51 | constraintExpression = intop18(Jphi)-If
    constr18: PointwiseConstraint "逐点约束 18" on domains 54 | constraintExpression = intop19(Jphi)-If
    constr19: PointwiseConstraint "逐点约束 19" on domains 57 | constraintExpression = intop20(Jphi)-If
    constr20: PointwiseConstraint "逐点约束 20" on domains 60 | constraintExpression = intop21(Jphi)-If

Mesh
  mesh1 "网格 1"
    size: MeshSizeDefault "大小" | hmax = 16.1; hmin = 0.072; hcurve = 0.3; hgrad = 1.3
    map1: Map "映射 1" on selection sel1
      dis1: Distribution "分布 1" on boundaries 9, 18, 27, 36, 45, 54, 63, 69, 81, 90, 99, 105, 117, 126, 135, 144, 153, 162, 171, 180
        numelem = 100
      dis2: Distribution "分布 2" (disabled) on no boundaries | numelem = 1
    map2: Map "映射 2" on domains 2, 4, 5, 7, 8, 10, 11, 13, 14, 16, 17, 19, 20, 22, 23, 25, 26, 28, 29, 31, 32, 34, 35, 37, 38, 40, 41, 43, 44, 46, 47, 49, 50, 52, 53, 55, 56, 58, 59, 61
      dis1: Distribution "分布 1" on boundaries 3, 183 | numelem = 100
    ftri1: FreeTri "自由三角形网格 1" on remaining entities
      size1: Size "大小 1" on entire geometry

Studies
  std1 "研究 1"
    time: Transient "瞬态" | tlist = range(0,1/f/10,1/f); usertol = on; rtol = 1e-5

Solver configurations
  sol1 "解 1" (study std1)
    v1: Variables "因变量 1"
    t1: Time "瞬态求解器 1" | tlist = range(0,1/f/10,1/f); estrat = exclude
      dDef: Direct "直接"
      fc1: FullyCoupled "全耦合 1" | linsolver = dDef; maxiter = 40

Datasets
  dset1: Solution | solution = sol1
  rev1: Revolve2D "二维旋转 1" | data = dset1; startangle = -90; revangle = 225

Plots
  pg1: PlotGroup2D "二维绘图组 1" | data = dset1
    surf1: Surface "表面 1" | expr = normB
  pg2: PlotGroup3D "三维绘图组 2" | data = rev1
    surf1: Surface "表面 1" | expr = Hr
  pg3: PlotGroup2D "二维绘图组 3" | data = dset1
    surf1: Surface "表面 1" | expr = Jphi/Jc0
      sel1: Selection "选择 1" on selection sel1