// COMSOL Multiphysics 6.2.0.290 model "YBCO_fracture_model.mph"
// Outline of the model tree

Parameters
  Eb1 = 32[GPa]  // Young’s modulus (YBCO)
  nub1 = 0.22  // Poisson’s ratio (YBCO)
  Gcb1 = 2280[J/m^2]  // Critical energy release rate (YBCO)
  rhob1 = 2450[kg/m^3]  // Mass density (YBCO)
  l0b1 = 0.25[mm]  // a length scale parameter to control the transition region
  para1 = 0.02[mm]  // 载荷参数
  height1 = 40[mm]  // 板高度
  width1 = 100[mm]  // 板宽度
  notchHeight1 = l0b1*2  // 缺口高度
  notchWidth1 = 50[mm]  // 缺口宽度
  notchLocation1 = 20[mm]  // 缺口位置
  n = 21  // fitting parameters of the E-J power law
  E0 = 1e-4[V/m]  // the electric field constant
  Jc0 = 1e9[A/m^2]  // the magnitude of critical current density when the local field is zero
  Tc = 92[K]  // critical temperature
  T0 = 40[K]  // ambient temperature
  Tr = 293[K]  // room temperature
  mu0 = 4e-7*pi [T*m/A]  // the vacuum permeability
  Bmax = 17[T]  // the maximum of applied magnetic field
  B0 = 2.5[T]  // fitting parameters in critical Kim model
  tau = 12[ms]  // a characteristic time for the rise of the pulsed magnetic field
  rhobulk = 5900[kg/m^3]  // Mass density (YBCO)
  Ebulk = 100[GPa]  // Young’s modulus (YBCO)
  nubulk = 0.33  // Poisson’s ratio (YBCO)
  sigmacbulk = 50[MPa]  // Tensile strength (YBCO)
  Gcbulk = 7.6[N/m]  // Critical energy release rate (YBCO)
  alphabulk = 5.2e-6[K^-1]  // Thermal expansion coefficient (YBCO)
  rhosus = 8000[kg/m^3]  // Mass density (stainless steel)
  Esus = 193[GPa]  // Young’s modulus (stainless steel)
  nusus = 0.28  // Poisson’s ratio (stainless steel)
  sigmacsus = 500[MPa]  // Tensile strength (stainless steel)
  Gcsus = 300[N/m]  // Critical energy release rate (stainless steel)
  alphasus = 12.7e-6[K^-1]  // Thermal expansion coefficient (stainless steel)
  rWire = 20[mm]  // the diameter of the sample
  a = 1.6[mm]  // 预裂纹长轴半径
  l01 = 27*Ebulk*Gcbulk/(256*sigmacbulk^2)  // a length scale parameter to control the transition region
  l02 = 8.44e-5[m]
  b = 0.05[mm]  // 预裂纹短轴半径
  rhoair = 1[Ω*m]
  a0 = 2.2[mm]  // 预裂纹长轴半径
  l0 = 16.88e-5[m]

Functions
  an1: Analytic "the applied magnetic field" | funcname = Bapp; expr = Bmax/mu0*t/tau*exp(1-t/tau); args = t; argunit = s

Variables
  var2 "Magnetic Field 变量 1"
    J1 = Hzy
    J2 = -Hzx
    J = sqrt(J1^2+J2^2+eps)
    E1 = rho*J1
    E2 = rho*J2
    E = rho*J
    Q = intop1(J*E)
    Bm = mu0*Hz
    sT = (1-(T0/Tc)^2)^1.5  // temperature dependence of the critical current density
    sB = B0/(B0+abs(mu0*Hz))  // magnetic field dependence of the critical current density
    sd = gd  // phase field dependence of the critical current density
    Jc = sT*sB*sd*Jc0  // critical current density
    FL1 = J2*mu0*Hz
    FL2 = -J1*mu0*Hz
  var1 "Phase-Field Fracture变量 2"
    Eb = Eb1/(1-nub1^2)
    nub = nub1/(1-nub1)
    lambda = Eb*nub/((1+nub)*(1-2*nub))  // Lamé constant
    mu = Eb/(2*(1+nub))  // Lamé constant
    gd = (1-k)*(1-phi)^2+k
    k = 1e-3  // an infinite small parameter to avoid ill-posedness
    Eta = MaxPsi  // maximum elastic strain energy density
    sg1 = lambda*(ep1+ep2+ep3)+2*mu*ep1
    sg2 = lambda*(ep1+ep2+ep3)+2*mu*ep2
    Psi0 = 0.5*(sg1*ep1+sg2*ep2)  // positive elastic strain energy density
    Psi1 = 0.5*(lambda*(ep11+ep22+ep33)^2+2*mu*(ep11^2+ep22^2+ep33^2)+mu*(ep12^2+(0+0)^2+(0+0)^2))  // elastic strain energy density
    sg11 = (lambda*(ep11+ep22+ep33)+2*mu*ep11)
    sg22 = (lambda*(ep11+ep22+ep33)+2*mu*ep22)
    sg12 = 2*mu*ep12
    ep11_positive = (ep11+abs(ep11))/2
    ep11_negative = (ep11 -abs(ep11))/2
    ep22_positive = (ep22+abs(ep22))/2
    ep22_negative = (ep22 -abs(ep22))/2
    ep12_positive = (ep12+abs(ep12))/2
    ep12_negative = (ep12 -abs(ep12))/2
    ep33_positive = (ep33+abs(ep33))/2
    ep33_negative = (ep33 -abs(ep33))/2
    Psi_positive1 = 0.5*(lambda*(((ep11+ep22+ep33)+abs(ep11+ep22+ep33))/2)^2+2*mu*(ep11_positive^2+ep22_positive^2+ep33_positive^2)+mu*(ep12_positive^2+(0+0)^2+(0+0)^2))  // positive elastic strain energy density
    Psi_positive0 = 0.5*(lambda*(((ep1+ep2+ep3)+abs(ep1+ep2+ep3))/2)^2+2*mu*(ep1_positive^2+ep2_positive^2+ep3_positive^2))  // positive elastic strain energy density
    Psi_negative0 = 0.5*(lambda*(((ep1+ep2+ep3) -abs(ep1+ep2+ep3))/2)^2+2*mu*(ep1_negative^2+ep2_negative^2+ep3_negative^2))  // negative elastic strain energy density
    sg11_positive = lambda*(((ep11+ep22+ep33)+abs(ep11+ep22+ep33))/2)+2*mu*ep11_positive
    sg11_negative = lambda*(((ep11+ep22+ep33) -abs(ep11+ep22+ep33))/2)+2*mu*ep11_negative
    sg22_positive = lambda*(((ep11+ep22+ep33)+abs(ep11+ep22+ep33))/2)+2*mu*ep22_positive
    sg22_negative = lambda*(((ep11+ep22+ep33) -abs(ep11+ep22+ep33))/2)+2*mu*ep22_negative
    sg12_positive = 2*mu*ep12_positive
    sg12_negative = 2*mu*ep12_negative
  var5 "Phase-Field Fracture变量 3"
    ep11 = u1x
    ep22 = u2y
    ep12 = (u1y+u2x)/2
    ep33 = -nub*(ep11+ep22)/(1-nub)
    ep1 = if(V.e11 == 0 && V.e12 == 0 && V.e13 == 1, V.e2, V.e1)
    ep2 = if(V.e31 == 0 && V.e32 == 0 && V.e33 == 1, V.e2, V.e3)
    ep3 = -nub*(ep1+ep2)/(1-nub)
    v11 = if(V.e11 == 0 && V.e12 == 0 && V.e13 == 1, V.e21, V.e11)
    v12 = if(V.e11 == 0 && V.e12 == 0 && V.e13 == 1, V.e22, V.e12)
    v21 = if(V.e31 == 0 && V.e32 == 0 && V.e33 == 1, V.e21, V.e31)
    v22 = if(V.e31 == 0 && V.e32 == 0 && V.e33 == 1, V.e22, V.e32)
    ep1_positive = (ep1+abs(ep1))/2
    ep1_negative = (ep1 -abs(ep1))/2
    ep2_positive = (ep2+abs(ep2))/2
    ep2_negative = (ep2 -abs(ep2))/2
    ep3_positive = -nub*(ep1_positive+ep2_positive)/(1-nub)
    ep3_negative = -nub*(ep1_negative+ep2_negative)/(1-nub)
    ep3_positive1 = (ep3+abs(ep3))/2
    ep3_negative1 = (ep3 -abs(ep3))/2
    Ep11 = v11^2*ep1+v21^2*ep2
    Ep22 = v12^2*ep1+v22^2*ep2
    Ep12 = v11*v12*ep1+v21*v22*ep2
    Ep33 = -nub*(Ep11+Ep22)/(1-nub)
    Ep11_positive = v11^2*ep1_positive+v21^2*ep2_positive
    Ep22_positive = v12^2*ep1_positive+v22^2*ep2_positive
    Ep12_positive = v11*v12*ep1_positive+v21*v22*ep2_positive
    Ep11_negative = v11^2*ep1_negative+v21^2*ep2_negative
    Ep22_negative = v12^2*ep1_negative+v22^2*ep2_negative
    Ep12_negative = v11*v12*ep1_negative+v21*v22*ep2_negative
    Ep33_positive = -nub*(Ep11_positive+Ep22_positive)/(1-nub)
    Ep33_negative = -nub*(Ep11_negative+Ep22_negative)/(1-nub)
    Psi_positive2 = 0.5*(Sg11_positive*Ep11_positive+Sg22_positive*Ep22_positive+Sg12_positive*Ep12_positive)  // Ep33 is not considered
    Psi_positive3 = 0.5*(lambda*(((Ep11+Ep22+Ep33)+abs(Ep11+Ep22+Ep33))/2)^2+2*mu*(Ep11_positive^2+Ep22_positive^2+Ep33_positive^2)+mu*(Ep12_positive^2+(0+0)^2+(0+0)^2))  // Ep33 is considered
    Psi_positive4 = 0.5*(lambda*(((ep1+ep2+ep3)+abs(ep1+ep2+ep3))/2)^2+2*mu*(ep1_positive^2+ep2_positive^2+ep3_positive^2))  // ep3 is considered
    Psi_positive = 0.5*(lambda*(((ep1+ep2+ep3)+abs(ep1+ep2+ep3))/2)^2+2*mu*(ep1_positive^2+ep2_positive^2))  // ep3 is not considered
    Sg11_positive = lambda*(((Ep11+Ep22+Ep33)+abs(Ep11+Ep22+Ep33))/2)+2*mu*Ep11_positive
    Sg11_negative = lambda*(((Ep11+Ep22+Ep33) -abs(Ep11+Ep22+Ep33))/2)+2*mu*Ep11_negative
    Sg22_positive = lambda*(((Ep11+Ep22+Ep33)+abs(Ep11+Ep22+Ep33))/2)+2*mu*Ep22_positive
    Sg22_negative = lambda*(((Ep11+Ep22+Ep33) -abs(Ep11+Ep22+Ep33))/2)+2*mu*Ep22_negative
    Sg12_positive = 2*mu*Ep12_positive
    Sg12_negative = 2*mu*Ep12_negative
    Sg11 = (lambda*(Ep11+Ep22+Ep33)+2*mu*Ep11)
    Sg22 = (lambda*(Ep11+Ep22+Ep33)+2*mu*Ep22)
    Sg12 = 2*mu*Ep12
    Sg11_positive1 = Eb/(1-nub^2)*(Ep11_positive+nub*Ep22_positive)
    Sg11_negative1 = Eb/(1-nub^2)*(Ep11_negative+nub*Ep22_negative)
    Sg22_positive1 = Eb/(1-nub^2)*(Ep22_positive+nub*Ep11_positive)
    Sg22_negative1 = Eb/(1-nub^2)*(Ep22_negative+nub*Ep11_negative)
    Sg12_positive1 = Eb/(1-nub^2)*(1-nub)/2*Ep12_positive
    Sg12_negative1 = Eb/(1-nub^2)*(1-nub)/2*Ep12_negative
    Sg11_positive3 = lambda*(Ep11_positive+Ep22_positive+Ep33_positive)+2*mu*Ep11_positive
    Sg11_negative3 = lambda*(Ep11_negative+Ep22_negative+Ep33_negative)+2*mu*Ep11_negative
    Sg22_positive3 = lambda*(Ep11_positive+Ep22_positive+Ep33_positive)+2*mu*Ep22_positive
    Sg22_negative3 = lambda*(Ep11_negative+Ep22_negative+Ep33_negative)+2*mu*Ep22_negative
    Sg12_positive3 = 2*mu*Ep12_positive
    Sg12_negative3 = 2*mu*Ep12_negative
  var7 "Phase-Field Fracture变量 4"
    dm = if( x <= width1/2 , abs(y-height1/2), sqrt((x-width1/2)^2+(y-height1/2)^2))
    PhiE = intop1(gd*Psi_positive0)
    PhiE1 = intop1(gd*Psi_positive0+Psi_negative0)
  var6 "Temperature变量 5"
    FT1 = -Eb/(1-nub)*alphabulk*d((T0-Tr),x)
    FT2 = -Eb/(1-nub)*alphabulk*d((T0-Tr),y)
    SgT1 = -Eb/(1-nub)*alphabulk*(T0-Tr)
    SgT2 = -Eb/(1-nub)*alphabulk*(T0-Tr)
  var3 "rho_sc" on domains 1, 2
    rho = E0/Jc*abs(J/Jc)^(n-1)
  var4 "rho_air" on domains 3
    rho = rhoair

Couplings
  intop1: Integration on domains 1-3

Common definitions
  state1: StateVariables "状态变量 1" on domains 1, 2
    state = MaxPsi
    initialValue = 0
    updateExpression = if(Psi_positive>MaxPsi,Psi_positive,MaxPsi)
    description = maximum elastic strain energy density
  state2: StateVariables "状态变量 2" (disabled) on no domains
    state = MaxPsi
    initialValue = if(dm<=l0b1, 1/k*Gcb1/4/l0b1*(1-dm/l0b1), 0)
    updateExpression = if(Psi_positive>MaxPsi, Psi_positive, MaxPsi)
    description = maximum elastic strain energy density
  matdiag1: MatrixDiagonalization on entire geometry | name = V; matrix = {{ep11, ep12, 0}, {ep12, ep22, 0}, {0, 0, 0}}

Geometry
  geom1 "几何 1" (2D, length unit m)
    c1: Circle | r = rWire
    pt1: Point "点 1" | p = {0, 0}
    r4: Rectangle | base = center; size = {1.98*rWire, rWire/10}
    e1: Ellipse | pos = {rWire/2, 0}; semiaxes = {a*rWire/10[mm], b*rWire/10[mm]}
    uni1: Union | input = c1, pt1
    c2: Circle (disabled) | r = 20*rWire
    r1: Rectangle "矩形 1" (disabled) | size = {width, height}
    r2: Rectangle "矩形 2" (disabled) | pos = {0, notchLocation-notchHeight/2}; size = {notchWidth, notchHeight}
    dif1: Difference "差集 1" (disabled) | input = r1; input2 = r2
    r3: Rectangle "矩形 3" (disabled) | pos = {50[mm], notchLocation-40*notchHeight/2}; size = {notchWidth, 40*notchHeight}
    fin: Finalize "形成联合体"
    mcd1: MeshControlDomains "网格控制域 1" (disabled) | input = fin 1

Physics
  g1: GeneralFormPDE "Magnetic Field" on all domains
    dependent variable Hz
    EquationForm.form = Automatic
    Units.DependentVariableQuantity = magneticfield
    gfeq1: GeneralFormPDE (default) | f = 0; Ga = {-rho*Hzx, -rho*Hzy}; da = mu0
    zflx1: ZeroFluxBoundary "Zero Flux 1" (default)
    init1: init "Initial Values 1" (default)
    dir1: DirichletBoundary "Dirichlet Boundary Condition 1" on boundaries 5-8 | r = Bapp(t); useDirichletCondition = 1
    constr1: PointwiseConstraint (disabled) on points 1
  g2: GeneralFormPDE "Force Field" on domains 1, 2
    dependent variable u1 = {u1, u2}
    EquationForm.form = Automatic
    Units.DependentVariableQuantity = displacement
    Units.SourceTermQuantity = forcedensity
    gfeq1: GeneralFormPDE "一般形式偏微分方程 1" (default)
      f = {-FL1, -FL2}
      Ga = 
        {gd*Sg11_positive+Sg11_negative*1, gd*Sg12_positive+Sg12_negative*1}
        {gd*Sg12_positive+Sg12_negative*1, gd*Sg22_positive+Sg22_negative*1}
      da = {0, 0, 0, 0}
      ea = {-rhobulk, 0, 0, -rhobulk}
    zflx1: ZeroFluxBoundary "零通量 1" (default)
    init1: init "初始值 1" (default)
    flux1: FluxBoundary "通量/源 1" (disabled) on no boundaries | g = {0, -10[MPa]}
    flux2: FluxBoundary "通量/源 2" (disabled) on no boundaries | g = {0, 10[MPa]}
    dir1: DirichletBoundary "Dirichlet Boundary Condition 1" (disabled) on no boundaries | r = {0, 0}
    dir2: DirichletBoundary "Dirichlet Boundary Condition 2" on points 4, 6 | r = {0, 0}; useDirichletCondition = {1, 0}
    dir3: DirichletBoundary "Dirichlet Boundary Condition 3" on points 1, 13 | r = {0, 0}; useDirichletCondition = {0, 1}
  g3: GeneralFormPDE "Fracture Field" on domains 1, 2
    dependent variable phi
    EquationForm.form = Automatic
    Units.DependentVariableQuantity = dimensionless
    Units.SourceTermQuantity = dimensionless
    gfeq1: GeneralFormPDE "一般形式偏微分方程 1" (default)
      f = 2/(Gcbulk*l0)*((Gcbulk/2/l0+Eta)*phi-Eta)
      Ga = {phix, phiy}
      da = 0
    zflx1: ZeroFluxBoundary "零通量 1" (default)
    init1: init "初始值 1" (default)

Mesh
  mesh1 "网格 1"
    size: MeshSizeDefault "大小" | hmax = 0.00148; hauto = 3
    ftri1: FreeTri "自由三角形网格 1" on remaining entities
      size1: Size "大小 1" on domains 2 | hmax = l0/2; hauto = 3; custom = on
  mesh2 "Mesh 2" (physics-controlled)

Studies
  std1 "研究 1"
    time: Transient "瞬态" | tunit = ms; tlist = range(0,0.1,10); usertol = on
  std2 "研究 2"
    time: Transient "瞬态" | tunit = ms; tlist = range(0,0.1,10); usertol = on

Solver configurations
  sol1 "解 1" (study std1)
    v1: Variables "因变量 1"
    t1: Time "瞬态求解器 1"
      tlist = range(0,0.1,10)
      atolglobal = 1e-6
      initialstepbdf = 1e-10
      maxstepbdf = 1e-3
      maxstepexpressionbdf = 1e-6
      maxstepconstraintgenalpha = const
      maxstepgenalpha = 1
      dDef: Direct "直接"
      se1: Segregated "分离 1" | segiter = 3; maxsegiter = 10; segstabacc = segaacc; segaaccdim = 50
        ss2: SegregatedStep "裂纹相场"
          segvar = {comp1_phi}
          linsolver = dDef
          subjtech = onevery
          subtermconst = tol
          subtermonres = auto
          maxsubiter = 25
          subntolfact = 1e-6
        g11: SegregatedStep "磁场+固体力学"
          segvar = {comp1_Hz, comp1_state1, comp1_u1, comp1_u2}
          subjtech = onevery
          subtermconst = tol
          subtermonres = auto
          maxsubiter = 25
          subntolfact = 1e-6
  sol2 "解 2" (study std2)
    v1: Variables "因变量 1"
    t1: Time "瞬态求解器 1" | tlist = range(0,0.1,10)
      dDef: Direct "直接"
      fc1: FullyCoupled "全耦合 1" | linsolver = dDef

Datasets
  dset1: Solution | solution = sol1
  dset2: Solution | solution = sol2

Derived values
  pev1: EvalPoint "Point Evaluation 1" on points 6
    data = dset1
    table = tbl1
    expr = {Sg11_positive, Sg11_negative, Sg11}
    unit = {Pa, Pa, Pa}

Tables
  tbl1: Table
    // Point Evaluation 1
    Time (ms) | Sg11_positive (Pa), Point: 4 | Sg11_negative (Pa), Point: 4 | Sg11 (Pa), Point: 4
    14.6 | 0.178843 | -1713.41 | -1713.23

Plots
  pg3: PlotGroup2D "Magnetic Field" | data = dset1
    surf1: Surface "表面 1" | expr = mu0*Hz
  pg2: PlotGroup2D "\phi" | data = dset1
    surf1: Surface "表面 1" | expr = phi
      def1: Deform "变形 1" (disabled) | expr = {u1, u2}
  pg4: PlotGroup2D "Current density" | data = dset1
    arws1: ArrowSurface | expr = {J1, J2}
    surf1: Surface "表面 1" | expr = J
  pg5: PlotGroup2D "Lorentz Force" | data = dset1
    arws1: ArrowSurface | expr = {FL1, FL2}; title = Lorentz Force
    surf1: Surface "表面 1" | expr = sqrt(FL1^2+FL2^2)
  pg6: PlotGroup2D "sigmma_x" | data = dset1
    surf1: Surface "表面 1" | expr = gd*sg11*1; unit = MPa
  pg7: PlotGroup2D "sigmma_y" | data = dset1
    surf1: Surface "表面 1" | expr = gd*sg22*1; unit = MPa

Exports
  img1: Image "图像 1"
    sourceobject = pg7
    size = manualweb
    unit = px
    width = 640
    height = 300
    pngfilename = D:\a_desktop\fracture\18Sgy.png
  anim1: Animation "动画 1" | giffilename = D:\a_desktop\fracture\2.gif; maxframes = 100; height = 300